// SBML level 2 version 1

model Ethylbenzene_celldesigner1()

  // Compartments:
  compartment compartment = 1;
  compartment Liver = 1;

  // Species:
  species CYP2E1 in Liver = 1;
  species Ethylbenzene in compartment = 2;
  species Ethylbenzene_CYP2E1 in Liver = 0;
  species One_phenylethanol in Liver = 0;

  // Reactions:
  Ethylbenzene_J0: Ethylbenzene_CYP2E1 => Ethylbenzene + CYP2E1; Ethylbenzene_J0_k2*Ethylbenzene_CYP2E1;
    Ethylbenzene_J0_k2 = 0.1;
  Ethylbenzene_J1: Ethylbenzene + CYP2E1 => Ethylbenzene_CYP2E1; Ethylbenzene_J0_k1*Ethylbenzene*CYP2E1;
    Ethylbenzene_J0_k1 = 0.1;
  Ethylbenzene_J2: Ethylbenzene_CYP2E1 => CYP2E1 + One_phenylethanol; Ethylbenzene_J1_k*Ethylbenzene_CYP2E1;
    Ethylbenzene_J1_k = 0.1;
end
