// SBML level 2 version 1

model Toluene_celldesigner1()

  // Compartments:
  compartment compartment = 1;
  compartment Liver in compartment = 1;

  // Species:
  species CYP2E1 in Liver = 1;
  species Toluene in compartment = 2;
  species Toluene_CYP2E1 in Liver = 0;
  species Benzyl_alcohol in Liver = 0;

  // Reactions:
  Toluene_J0: Toluene_CYP2E1 => Toluene + CYP2E1; Toluene_J0_k2*Toluene_CYP2E1;
    Toluene_J0_k2 = 0.1;
  Toluene_J1: Toluene + CYP2E1 => Toluene_CYP2E1; Toluene_J0_k1*Toluene*CYP2E1;
    Toluene_J0_k1 = 0.1;
  Toluene_J2: Toluene_CYP2E1 => CYP2E1 + Benzyl_alcohol; Toluene_J1_k*Toluene_CYP2E1;
    Toluene_J1_k = 0.1;
end
