// SBML level 2 version 1

model Xylene_celldesigner()

  // Compartments:
  compartment compartment = 1;
  compartment Liver = 1;

  // Species:
  species CYP2E1 in Liver = 1;
  species Xylene in compartment = 2;
  species Xylene_CYP2E1 in Liver = 0;
  species Methylbenzyl_alcohol in Liver = 0;

  // Reactions:
  Xylene_J0: Xylene_CYP2E1 => Xylene + CYP2E1; Xylene_J0_k2*Xylene_CYP2E1;
    Xylene_J0_k2 = 0.1;
  Xylene_J1: Xylene + CYP2E1 => Xylene_CYP2E1; Xylene_J0_k1*Xylene*CYP2E1;
    Xylene_J0_k1 = 0.1;
  Xylene_J2: Xylene_CYP2E1 => CYP2E1 + Methylbenzyl_alcohol; Xylene_J1_k*Xylene_CYP2E1;
    Xylene_J1_k = 0.1;
end
