// SBML level 2 version 1

model Benzene_celldesigner4()

  // Compartments:
  compartment compartment = 1;
  compartment Liver = 1;

  // Species:
  species CYP2E1 in Liver = 1;
  species Benzene in compartment = 2;
  species Benzene_CYP2E1 in Liver = 0;
  species Benzene_oxide in compartment = 0;
  species Benzene_CYP2B1 in Liver = 0;
  species CYP2B1 in Liver = 1;

  // Reactions:
  Benzene_J0: Benzene_CYP2E1 => Benzene + CYP2E1; Benzene_J0_k2*Benzene_CYP2E1;
    Benzene_J0_k2 = 0.1;
  Benzene_J1: Benzene + CYP2E1 => Benzene_CYP2E1; Benzene_J0_k1*Benzene*CYP2E1; Benzene_J1 is "Benzene_J0";
    Benzene_J0_k1 = 0.1;
  Benzene_J2: Benzene_CYP2E1 => CYP2E1 + Benzene_oxide; Benzene_J1_k*Benzene_CYP2E1; Benzene_J2 is "Benzene_J1";
    Benzene_J1_k = 0.1;
  Benzene_J1_B: Benzene + CYP2B1 => Benzene_CYP2B1; Benzene_J0_k1_B*Benzene*CYP2B1; Benzene_J1_B is "Benzene_J0_B";
    Benzene_J0_k1_B = 0.1;
  Benzene_J0_B: Benzene_CYP2B1 => CYP2B1 + Benzene; Benzene_J0_k2_B*Benzene_CYP2B1;
    Benzene_J0_k2_B = 0.1;
  Benzene_J2_B: Benzene_CYP2B1 => CYP2B1 + Benzene_oxide; Benzene_J1_k_B*Benzene_CYP2B1; Benzene_J2_B is "Benzene_J1_B";
    Benzene_J1_k_B = 0.1;
end
