// SBML level 2 version 1

model Ethylbenzene_celldesigner4()

  // Compartments:
  compartment compartment = 1;
  compartment Liver = 1;

  // Species:
  species CYP2E1 in Liver = 1;
  species Ethylbenzene in compartment = 2;
  species Ethylbenzene_CYP2E1 in Liver = 0;
  species One_phenylethanol in compartment = 0;
  species Ethylbenzene_CYP2B1 in Liver = 0;
  species CYP2B1 in Liver = 1;

  // Reactions:
  Ethylbenzene_J0: Ethylbenzene_CYP2E1 => Ethylbenzene + CYP2E1; Ethylbenzene_J0_k2*Ethylbenzene_CYP2E1;
    Ethylbenzene_J0_k2 = 0.1;
  Ethylbenzene_J1: Ethylbenzene + CYP2E1 => Ethylbenzene_CYP2E1; Ethylbenzene_J0_k1*Ethylbenzene*CYP2E1; Ethylbenzene_J1 is "Ethylbenzene_J0";
    Ethylbenzene_J0_k1 = 0.1;
  Ethylbenzene_J2: Ethylbenzene_CYP2E1 => CYP2E1 + One_phenylethanol; Ethylbenzene_J1_k*Ethylbenzene_CYP2E1; Ethylbenzene_J2 is "Ethylbenzene_J1";
    Ethylbenzene_J1_k = 0.1;
  Ethylbenzene_J1_B: Ethylbenzene + CYP2B1 => Ethylbenzene_CYP2B1; Ethylbenzene_J0_k1_B*Ethylbenzene*CYP2B1; Ethylbenzene_J1_B is "Ethylbenzene_J0_B";
    Ethylbenzene_J0_k1_B = 0.1;
  Ethylbenzene_J0_B: Ethylbenzene_CYP2B1 => CYP2B1 + Ethylbenzene; Ethylbenzene_J0_k2_B*Ethylbenzene_CYP2B1;
    Ethylbenzene_J0_k2_B = 0.1;
  Ethylbenzene_J2_B: Ethylbenzene_CYP2B1 => CYP2B1 + One_phenylethanol; Ethylbenzene_J1_k_B*Ethylbenzene_CYP2B1; Ethylbenzene_J2_B is "Ethylbenzene_J1_B";
    Ethylbenzene_J1_k_B = 0.1;
end
