// SBML level 2 version 1

model Toluene_celldesigner4()

  // Compartments:
  compartment compartment = 1;
  compartment Liver = 1;

  // Species:
  species CYP2E1 in Liver = 1;
  species Toluene in compartment = 2;
  species Toluene_CYP2E1 in Liver = 0;
  species Benzyl_alcohol in compartment = 0;
  species Toluene_CYP2B1 in Liver = 0;
  species CYP2B1 in Liver = 1;

  // Reactions:
  Toluene_J0: Toluene_CYP2E1 => Toluene + CYP2E1; Toluene_J0_k2*Toluene_CYP2E1;
    Toluene_J0_k2 = 0.1;
  Toluene_J1: Toluene + CYP2E1 => Toluene_CYP2E1; Toluene_J0_k1*Toluene*CYP2E1; Toluene_J1 is "Toluene_J0";
    Toluene_J0_k1 = 0.1;
  Toluene_J2: Toluene_CYP2E1 => CYP2E1 + Benzyl_alcohol; Toluene_J1_k*Toluene_CYP2E1; Toluene_J2 is "Toluene_J1";
    Toluene_J1_k = 0.1;
  Toluene_J1_B: Toluene + CYP2B1 => Toluene_CYP2B1; Toluene_J0_k1_B*Toluene*CYP2B1; Toluene_J1_B is "Toluene_J0_B";
    Toluene_J0_k1_B = 0.1;
  Toluene_J0_B: Toluene_CYP2B1 => CYP2B1 + Toluene; Toluene_J0_k2_B*Toluene_CYP2B1;
    Toluene_J0_k2_B = 0.1;
  Toluene_J2_B: Toluene_CYP2B1 => CYP2B1 + Benzyl_alcohol; Toluene_J1_k_B*Toluene_CYP2B1; Toluene_J2_B is "Toluene_J1_B";
    Toluene_J1_k_B = 0.1;
end
