// SBML level 2 version 1

model Benzene_celldesignerPB11()

  // Compartments:
  compartment compartment = 1;
  compartment Liver = 1;

  // Species:
  species CYP2E1 in Liver = 1;
  species Benzene in compartment = 2;
  species Benzene_CYP2E1 in Liver = 0;
  species PB1_CYP2E1 in Liver = 0;
  species PB2 in compartment = 0;
  species PB1 in compartment = 0;

  // Reactions:
  Benzene_J2: Benzene_CYP2E1 => Benzene + CYP2E1; Benzene_J2_k2*Benzene_CYP2E1;
    Benzene_J2_k2 = 0.1;
  Benzene_J1: Benzene + CYP2E1 => Benzene_CYP2E1; Benzene_J1_k1*Benzene*CYP2E1;
    Benzene_J1_k1 = 0.1;
  Benzene_J3: Benzene_CYP2E1 => CYP2E1 + PB1; Benzene_J3_k3*Benzene_CYP2E1;
    Benzene_J3_k3 = 0.1;
  Benzene_J4: CYP2E1 + PB1 => PB1_CYP2E1; Benzene_J4_k1*PB1*CYP2E1;
    Benzene_J4_k1 = 0.1;
  Benzene_J5: PB1_CYP2E1 => CYP2E1 + PB1; Benzene_J5_k2*PB1_CYP2E1;
    Benzene_J5_k2 = 0.1;
  Benzene_J6: PB1_CYP2E1 => CYP2E1 + PB2; Benzene_J6_k3*PB1_CYP2E1;
    Benzene_J6_k3 = 0.1;
end
