// SBML level 2 version 1

model Ethylbenzene_celldesigner1()

  // Compartments:
  compartment compartment = 1;
  compartment Liver = 1;

  // Species:
  species CYP2E1 in Liver = 1;
  species Ethylbenzene in compartment = 2;
  species Ethylbenzene_CYP2E1 in Liver = 0;
  species PE1_CYP2E1 in Liver = 0;
  species PE2 in compartment = 0;
  species PE1 in compartment = 0;

  // Reactions:
  Ethylbenzene_J2: Ethylbenzene_CYP2E1 => Ethylbenzene + CYP2E1; Ethylbenzene_J2_k2*Ethylbenzene_CYP2E1;
    Ethylbenzene_J2_k2 = 0.1;
  Ethylbenzene_J1: Ethylbenzene + CYP2E1 => Ethylbenzene_CYP2E1; Ethylbenzene_J1_k1*Ethylbenzene*CYP2E1;
    Ethylbenzene_J1_k1 = 0.1;
  Ethylbenzene_J3: Ethylbenzene_CYP2E1 => CYP2E1 + PE1; Ethylbenzene_J3_k3*Ethylbenzene_CYP2E1;
    Ethylbenzene_J3_k3 = 0.1;
  Ethylbenzene_J4: CYP2E1 + PE1 => PE1_CYP2E1; Ethylbenzene_J4_k1*PE1*CYP2E1;
    Ethylbenzene_J4_k1 = 0.1;
  Ethylbenzene_J5: PE1_CYP2E1 => CYP2E1 + PE1; Ethylbenzene_J5_k2*PE1_CYP2E1;
    Ethylbenzene_J5_k2 = 0.1;
  Ethylbenzene_J6: PE1_CYP2E1 => CYP2E1 + PE2; Ethylbenzene_J6_k3*PE1_CYP2E1;
    Ethylbenzene_J6_k3 = 0.1;
end
