// SBML level 2 version 1

model Toluene_celldesigner1()

  // Compartments:
  compartment compartment = 1;
  compartment Liver = 1;

  // Species:
  species CYP2E1 in Liver = 1;
  species Toluene in compartment = 2;
  species Toluene_CYP2E1 in Liver = 0;
  species PT1_CYP2E1 in Liver = 0;
  species PT2 in compartment = 0;
  species PT1 in compartment = 0;

  // Reactions:
  Toluene_J2: Toluene_CYP2E1 => Toluene + CYP2E1; Toluene_J2_k2*Toluene_CYP2E1;
    Toluene_J2_k2 = 0.1;
  Toluene_J1: Toluene + CYP2E1 => Toluene_CYP2E1; Toluene_J1_k1*Toluene*CYP2E1;
    Toluene_J1_k1 = 0.1;
  Toluene_J3: Toluene_CYP2E1 => CYP2E1 + PT1; Toluene_J3_k3*Toluene_CYP2E1;
    Toluene_J3_k3 = 0.1;
  Toluene_J4: CYP2E1 + PT1 => PT1_CYP2E1; Toluene_J4_k1*PT1*CYP2E1;
    Toluene_J4_k1 = 0.1;
  Toluene_J5: PT1_CYP2E1 => CYP2E1 + PT1; Toluene_J5_k2*PT1_CYP2E1;
    Toluene_J5_k2 = 0.1;
  Toluene_J6: PT1_CYP2E1 => CYP2E1 + PT2; Toluene_J6_k3*PT1_CYP2E1;
    Toluene_J6_k3 = 0.1;
end
