// SBML level 2 version 1

model Xylene_celldesigner1()

  // Compartments:
  compartment compartment = 1;
  compartment Liver = 1;

  // Species:
  species CYP2E1 in Liver = 1;
  species Xylene in compartment = 2;
  species Xylene_CYP2E1 in Liver = 0;
  species PX1_CYP2E1 in Liver = 0;
  species PX2 in compartment = 0;
  species PX1 in compartment = 0;

  // Reactions:
  Xylene_J2: Xylene_CYP2E1 => Xylene + CYP2E1; Xylene_J2_k2*Xylene_CYP2E1;
    Xylene_J2_k2 = 0.1;
  Xylene_J1: Xylene + CYP2E1 => Xylene_CYP2E1; Xylene_J1_k1*Xylene*CYP2E1;
    Xylene_J1_k1 = 0.1;
  Xylene_J3: Xylene_CYP2E1 => CYP2E1 + PX1; Xylene_J3_k3*Xylene_CYP2E1;
    Xylene_J3_k3 = 0.1;
  Xylene_J4: CYP2E1 + PX1 => PX1_CYP2E1; Xylene_J4_k1*PX1*CYP2E1;
    Xylene_J4_k1 = 0.1;
  Xylene_J5: PX1_CYP2E1 => CYP2E1 + PX1; Xylene_J5_k2*PX1_CYP2E1;
    Xylene_J5_k2 = 0.1;
  Xylene_J6: PX1_CYP2E1 => CYP2E1 + PX2; Xylene_J6_k3*PX1_CYP2E1;
    Xylene_J6_k3 = 0.1;
end
